Fri Oct 13 13:54:55 EDT 2023
$PROB RUN# 100 - fit of Phase I data base model
$INPUT C NUM ID TIME SEQ CMT EVID AMT DV AGE WT HT EGFR ALB BMI SEX AAG
       SCR AST ALT CP TAFD TAD LDOS MDV BLQ PHASE

$DATA ../../../data/derived/analysis3.csv IGNORE=@ IGNORE=(BLQ.EQ.1)

$SUBROUTINE ADVAN2 TRANS2

$PK

;log transformed PK parms

KA   = EXP(THETA(1)+ETA(1))
V   = EXP(THETA(2)+ETA(2))
CL   = EXP(THETA(3)+ETA(3))

S2 = V/1000 ; dose in mcg, conc in mcg/mL

$ERROR
IPRED = F

Y=IPRED*(1+EPS(1))

$THETA  ; log values
(-0.69)   ;  1 KA (1/hr) - 1.5
(3.5)   ;  2 V2 (L) - 60
(1)     ;  3 CL (L/hr) - 3.5

$OMEGA BLOCK(3)
0.2   ;ETA(KA)
0.01 0.2   ;ETA(V)
0.01 0.01 0.2   ;ETA(CL)

$SIGMA
0.05     ; 1 pro error

$EST MAXEVAL=9999 METHOD=1 INTER SIGL=9 NSIG=3 PRINT=1 RANMETHOD=P MSFO=./100.msf
$COV PRINT=E RANMETHOD=P
$TABLE NUM IPRED NPDE CWRES NOPRINT ONEHEADER RANMETHOD=P FILE=100.tab
$TABLE NUM CL V KA ETAS(1:LAST) NOAPPEND NOPRINT ONEHEADER FILE=100par.tab

NM-TRAN MESSAGES
 WARNINGS AND ERRORS (IF ANY) FOR PROBLEM    1
 (WARNING  2) NM-TRAN INFERS THAT THE DATA ARE POPULATION.
Note: Analytical 2nd Derivatives are constructed in FSUBS but are never used.
      You may insert $ABBR DERIV2=NO after the first $PROB to save FSUBS construction and compilation time

1NONLINEAR MIXED EFFECTS MODEL PROGRAM (NONMEM) VERSION 7.5.1
 ORIGINALLY DEVELOPED BY STUART BEAL, LEWIS SHEINER, AND ALISON BOECKMANN
 CURRENT DEVELOPERS ARE ROBERT BAUER, ICON DEVELOPMENT SOLUTIONS,
 AND ALISON BOECKMANN. IMPLEMENTATION, EFFICIENCY, AND STANDARDIZATION
 PERFORMED BY NOUS INFOSYSTEMS.
 PROBLEM NO.:         1
 RUN# 100 - fit of Phase I data base model
 TOT. NO. OF OBS RECS:     3142
 TOT. NO. OF INDIVIDUALS:      160
 ONE COMPARTMENT MODEL WITH FIRST-ORDER ABSORPTION (ADVAN2)
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 #TBLN:      1
 #METH: First Order Conditional Estimation with Interaction
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
 #TERM:
0MINIMIZATION SUCCESSFUL
 NO. OF FUNCTION EVALUATIONS USED:      478
 NO. OF SIG. DIGITS IN FINAL EST.:  3.5
0PARAMETER ESTIMATE IS NEAR ITS BOUNDARY
 THIS MUST BE ADDRESSED BEFORE THE COVARIANCE STEP CAN BE IMPLEMENTED

 ETABAR IS THE ARITHMETIC MEAN OF THE ETA-ESTIMATES,
 AND THE P-VALUE IS GIVEN FOR THE NULL HYPOTHESIS THAT THE TRUE MEAN IS 0.

 ETABAR:         2.9274E-03 -2.4178E-03  1.1673E-03
 SE:             1.8345E-02  2.2123E-02  3.2493E-02
 N:                     160         160         160

 P VAL.:         8.7322E-01  9.1297E-01  9.7134E-01

 ETASHRINKSD(%)  3.1521E+00  4.2847E+00  1.1578E+00
 ETASHRINKVR(%)  6.2049E+00  8.3857E+00  2.3022E+00
 EBVSHRINKSD(%)  3.7630E+00  4.2687E+00  1.4275E+00
 EBVSHRINKVR(%)  7.3844E+00  8.3552E+00  2.8346E+00
 RELATIVEINF(%)  4.5551E-04  3.3962E-02  1.0000E-10
 EPSSHRINKSD(%)  4.0862E+00
 EPSSHRINKVR(%)  8.0054E+00


 TOTAL DATA POINTS NORMALLY DISTRIBUTED (N):         3142
 N*LOG(2PI) CONSTANT TO OBJECTIVE FUNCTION:    5774.6097426581628
 OBJECTIVE FUNCTION VALUE WITHOUT CONSTANT:    33502.964965245534
 OBJECTIVE FUNCTION VALUE WITH CONSTANT:       39277.574707903696
 REPORTED OBJECTIVE FUNCTION DOES NOT CONTAIN CONSTANT

 TOTAL EFFECTIVE ETAS (NIND*NETA):                           480


 #TERE:
 Elapsed estimation  time in seconds:    51.78
 Elapsed postprocess time in seconds:     3.43

 ********************               FIRST ORDER CONDITIONAL ESTIMATION WITH INTERACTION              ********************
 #OBJT:**************                       MINIMUM VALUE OF OBJECTIVE FUNCTION                      ********************
 #OBJV:********************************************    33502.965       **************************************************

 ********************               FIRST ORDER CONDITIONAL ESTIMATION WITH INTERACTION              ********************
 ********************                             FINAL PARAMETER ESTIMATE                           ********************

 THETA - VECTOR OF FIXED EFFECTS PARAMETERS   *********
         TH 1      TH 2      TH 3
         1.40E+00  4.56E+00  1.04E+00

 OMEGA - COV MATRIX FOR RANDOM EFFECTS - ETAS  ********
         ETA1      ETA2      ETA3
 ETA1
+        5.74E-02
 ETA2
+       -1.56E-04  8.55E-02
 ETA3
+        7.04E-02  8.58E-02  1.73E-01

 SIGMA - COV MATRIX FOR RANDOM EFFECTS - EPSILONS  ****
         EPS1
 EPS1
+        8.82E-02

 OMEGA - CORR MATRIX FOR RANDOM EFFECTS - ETAS  *******
         ETA1      ETA2      ETA3
 ETA1
+        2.40E-01
 ETA2
+       -2.23E-03  2.92E-01
 ETA3
+        7.07E-01  7.06E-01  4.16E-01

 SIGMA - CORR MATRIX FOR RANDOM EFFECTS - EPSILONS  ***
         EPS1
 EPS1
+        2.97E-01
 Elapsed finaloutput time in seconds:     0.42
 #CPUT: Total CPU Time in Seconds,       52.569
